*Heading
** Job name: plane_stress Model name: Model-1
** Generated by: Abaqus/CAE 6.14-1
*Preprint, echo=NO, model=NO, history=NO, contact=NO
**
** PARTS
**
*Part, name=Part-1
*End Part
**
**
** ASSEMBLY
**
*Assembly, name=Assembly
**
*Instance, name=Part-1-1, part=Part-1
*Node
      1,           0.,           0.
      2,  0.100000001,           0.
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*Element, type=CPS4R
  1,   1,   2,  43,  42
  2,   2,   3,  44,  43
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*Nset, nset=Set-1, generate
   1,  861,    1
*Elset, elset=Set-1, generate
   1,  800,    1
** Section: Plate
*Solid Section, elset=Set-1, material=Steel
,
*End Instance
**
*Nset, nset=Set-1, instance=Part-1-1, generate
  1,  41,   1
*Elset, elset=Set-1, instance=Part-1-1, generate
  1,  40,   1
*Nset, nset=Set-2, instance=Part-1-1, generate
   1,  821,   41
*Elset, elset=Set-2, instance=Part-1-1, generate
   1,  761,   40
*Elset, elset=_Surf-1_S2, internal, instance=Part-1-1, generate
  40,  800,   40
*Surface, type=ELEMENT, name=Surf-1
_Surf-1_S2, S2
*End Assembly
**
** MATERIALS
**
*Material, name=Steel
*Elastic
 2e+11, 0.3
*Plastic
  3.5e+08,  0.
 3.55e+08, 0.1
** ----------------------------------------------------------------
**
** STEP: Step-1
**
*Step, name=Step-1, nlgeom=NO
*Static
1., 1., 1e-05, 1.
**
** BOUNDARY CONDITIONS
**
** Name: BC-1 Type: Displacement/Rotation
*Boundary
Set-1, 2, 2
Set-1, 6, 6
** Name: BC-2 Type: Displacement/Rotation
*Boundary
Set-2, 1, 1
Set-2, 6, 6
**
** LOADS
**
** Name: Distributed load   Type: Pressure
*Dsload
Surf-1, P, -5e+07
**
** OUTPUT REQUESTS
**
*Restart, write, frequency=0
**
** FIELD OUTPUT: F-Output-1
**
*Output, field
*Node Output
CF, RF, U
*Element Output, directions=YES
LE, PE, PEEQ, PEMAG, S
**
** HISTORY OUTPUT: H-Output-1
**
*Output, history, variable=PRESELECT
*End Step
