*Heading
** Job name: butter Model name: Model-1
** Generated by: Abaqus/CAE 6.14-5
*Preprint, echo=NO, model=NO, history=NO, contact=NO
**
** PARTS
**
*Part, name=Part-1
*End Part
**
**
** ASSEMBLY
**
*Assembly, name=Assembly
**
*Instance, name=Part-1-1, part=Part-1
*Node
      1,           0.,          16.
      2,           0.,           0.
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*Element, type=CPS4
  1, 130,  41,  42, 131
  2,  53,  54, 161, 172
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*Nset, nset=Set-1, generate
   1,  456,    1
*Elset, elset=Set-1, generate
   1,  412,    1
** Section: Section-1
*Solid Section, elset=Set-1, material=Material-1
,
*End Instance
**
*Nset, nset=Set-7, instance=Part-1-1
  2,  3, 51, 52, 53, 54
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*Elset, elset=Set-7, instance=Part-1-1
   2,   8,  43,  44,  47,  49
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*Nset, nset=Set-8, instance=Part-1-1
  1,  2, 31, 32, 33, 34
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*Elset, elset=Set-8, instance=Part-1-1
   1,   9,  10,  11,  12,  24
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*Nset, nset=Set-9, instance=Part-1-1
  1, 13, 14, 15, 16, 17
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*Elset, elset=Set-9, instance=Part-1-1
  14,  15,  16,  20,  21,  24
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*Nset, nset=Set-12, instance=Part-1-1
  1, 20, 21, 22, 23, 24
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*Elset, elset=Set-12, instance=Part-1-1
  16,  20,  21,  24,  70,  73,  78,  79,  87,  90, 111, 117, 128, 130, 402, 403
*Nset, nset=Set-13, instance=Part-1-1
  1, 13, 14, 15, 16, 17
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*Elset, elset=Set-13, instance=Part-1-1
  14,  15,  16,  20,  21,  24
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*Nset, nset=Set-14, instance=Part-1-1
  1, 20, 21, 22, 23, 24
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*Elset, elset=Set-14, instance=Part-1-1
  16,  20,  21,  24,  70,  73,  78,  79,  87,  90, 111, 117, 128, 130, 402, 403
*Nset, nset=Set-15, instance=Part-1-1
  1, 13, 14, 15, 16, 17
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*Elset, elset=Set-15, instance=Part-1-1
  14,  15,  16,  20,  21,  24
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*End Assembly
**
** MATERIALS
**
*Material, name=Material-1
*USER MATERIAL, CONSTANTS=9
0.3, 5000., 500., 0., 50., 7500., 0.6, 100., 3.
*DEPVAR
8
*INITIAL CONDITIONS, TYPE=SOLUTION,USER
** ----------------------------------------------------------------
**
** STEP: Step-1
**
*Step, name=Step-1, nlgeom=NO
*Static, direct
0.2, 5.,
**
** BOUNDARY CONDITIONS
**
** Name: BC-1 Type: Symmetry/Antisymmetry/Encastre
*Boundary
Set-7, YSYMM
** Name: BC-2 Type: Symmetry/Antisymmetry/Encastre
*Boundary
Set-8, XSYMM
** Name: BC-3 Type: Displacement/Rotation
*Boundary
Set-15, 2, 2, 0.6
**
** OUTPUT REQUESTS
**
*Restart, write, frequency=0
**
** FIELD OUTPUT: F-Output-1
**
*Output, field, variable=PRESELECT
**
** HISTORY OUTPUT: H-Output-1
**
*Output, history, variable=PRESELECT
*End Step
